<?xml version="1.0" encoding="UTF-8"?>
<fdm_config name="Falcon9Booster" version="2.0">
  <fileheader>
    <author>Generated by AeromatiC++ and edited by User - Corrected for JSBSim</author>
    <filecreationdate>2025-05-21</filecreationdate>
    <version>2.0</version>
    <description>Falcon 9 Booster (Block 5) configuration for JSBSim with RCS thrusters, TVC, and landing gear</description>
  </fileheader>

  <metrics>
    <wingarea unit="FT2">113.0</wingarea>
    <wingspan unit="FT">12.0</wingspan>
    <chord unit="FT">135.2</chord>
    <htailarea unit="FT2">0.0</htailarea>
    <htailarm unit="FT">0.0</htailarm>
    <vtailarea unit="FT2">0.0</vtailarea>
    <vtailarm unit="FT">0.0</vtailarm>
    <location name="AERORP" unit="IN">
      <x>925.2</x>
      <y>0.0</y>
      <z>0.0</z>
    </location>
  </metrics>

  <mass_balance>
    <ixx unit="SLUG*FT2">36874.8</ixx>
    <iyy unit="SLUG*FT2">1474992</iyy>
    <izz unit="SLUG*FT2">1474992</izz>
    <emptywt unit="LBS">56000</emptywt>
    <location name="CG" unit="IN">
      <x>925.2</x>
      <y>0.0</y>
      <z>0.0</z>
    </location>
  </mass_balance>

  <ground_reactions>
    <gear name="LEG_FL" unit="0">
      <location unit="IN">
        <x>-1622.4</x>
        <y>36.0</y>
        <z>-72.0</z>
      </location>
      <static_friction>0.8</static_friction>
      <dynamic_friction>0.5</dynamic_friction>
      <rolling_friction>0.02</rolling_friction>
      <spring_coeff unit="LBS/FT">200000</spring_coeff>
      <damping_coeff unit="LBS/FT/SEC">15000</damping_coeff>
      <brake_group>NONE</brake_group>
      <steer_type>FIXED</steer_type>
      <max_steer unit="DEG">0.0</max_steer>
    </gear>
    <gear name="LEG_FR" unit="1">
      <location unit="IN">
        <x>-1622.4</x>
        <y>-36.0</y>
        <z>-72.0</z>
      </location>
      <static_friction>0.8</static_friction>
      <dynamic_friction>0.5</dynamic_friction>
      <rolling_friction>0.02</rolling_friction>
      <spring_coeff unit="LBS/FT">200000</spring_coeff>
      <damping_coeff unit="LBS/FT/SEC">15000</damping_coeff>
      <brake_group>NONE</brake_group>
      <steer_type>FIXED</steer_type>
      <max_steer unit="DEG">0.0</max_steer>
    </gear>
    <gear name="LEG_BL" unit="2">
      <location unit="IN">
        <x>-1622.4</x>
        <y>0.0</y>
        <z>36.0</z>
      </location>
      <static_friction>0.8</static_friction>
      <dynamic_friction>0.5</dynamic_friction>
      <rolling_friction>0.02</rolling_friction>
      <spring_coeff unit="LBS/FT">200000</spring_coeff>
      <damping_coeff unit="LBS/FT/SEC">15000</damping_coeff>
      <brake_group>NONE</brake_group>
      <steer_type>FIXED</steer_type>
      <max_steer unit="DEG">0.0</max_steer>
    </gear>
    <gear name="LEG_BR" unit="3">
      <location unit="IN">
        <x>-1622.4</x>
        <y>0.0</y>
        <z>-36.0</z>
      </location>
      <static_friction>0.8</static_friction>
      <dynamic_friction>0.5</dynamic_friction>
      <rolling_friction>0.02</rolling_friction>
      <spring_coeff unit="LBS/FT">200000</spring_coeff>
      <damping_coeff unit="LBS/FT/SEC">15000</damping_coeff>
      <brake_group>NONE</brake_group>
      <steer_type>FIXED</steer_type>
      <max_steer unit="DEG">0.0</max_steer>
    </gear>
  </ground_reactions>

  <propulsion>
    <tank type="FUEL" number="0">
      <location unit="IN">
        <x>-800</x>
        <y>0</y>
        <z>0</z>
      </location>
      <capacity unit="LBS">50000</capacity>
      <contents unit="LBS">50000</contents>
    </tank>
    <tank type="OXIDIZER" number="1">
      <location unit="IN">
        <x>-600</x>
        <y>0</y>
        <z>0</z>
      </location>
      <capacity unit="LBS">120000</capacity>
      <contents unit="LBS">120000</contents>
    </tank>
    <tank type="FUEL" number="2">
      <location unit="IN">
        <x>800</x>
        <y>0</y>
        <z>0</z>
      </location>
      <capacity unit="LBS">1000</capacity>
      <contents unit="LBS">1000</contents>
    </tank>
    <engine name="MainBoosterEngine">
      <file>Merlin1D</file>
      <location unit="IN">
        <x>-1600</x>
        <y>0</y>
        <z>0</z>
      </location>
      <orient unit="DEG">
        <pitch>0.0</pitch>
        <yaw>0.0</yaw>
        <roll>0.0</roll>
      </orient>
      <feed>0</feed>
      <feed>1</feed>
      <thruster>
        <file>merlin1d_nozzle</file>
        <location unit="IN">
          <x>-1600</x>
          <y>0</y>
          <z>0</z>
        </location>
        <orient unit="DEG">
          <pitch>0</pitch>
          <yaw>0</yaw>
          <roll>0</roll>
        </orient>
      </thruster>
      <gimbal>
        <pitch min="-5" max="5" rate="10">
          <control>fcs/pitch-gimbal-cmd</control>
        </pitch>
        <yaw min="-5" max="5" rate="10">
          <control>fcs/yaw-gimbal-cmd</control>
        </yaw>
      </gimbal>
    </engine>
    <thruster name="rcs_pitch_up">
      <file>rcs_thruster</file>
      <location unit="IN">
        <x>900</x>
        <y>0</y>
        <z>72</z>
      </location>
      <orient unit="DEG">
        <pitch>90</pitch>
        <yaw>0</yaw>
        <roll>0</roll>
      </orient>
      <feed>2</feed>
    </thruster>
    <thruster name="rcs_pitch_down">
      <file>rcs_thruster</file>
      <location unit="IN">
        <x>900</x>
        <y>0</y>
        <z>-72</z>
      </location>
      <orient unit="DEG">
        <pitch>-90</pitch>
        <yaw>0</yaw>
        <roll>0</roll>
      </orient>
      <feed>2</feed>
    </thruster>
    <thruster name="rcs_yaw_left">
      <file>rcs_thruster</file>
      <location unit="IN">
        <x>900</x>
        <y>-72</y>
        <z>0</z>
      </location>
      <orient unit="DEG">
        <pitch>0</pitch>
        <yaw>-90</yaw>
        <roll>0</roll>
      </orient>
      <feed>2</feed>
    </thruster>
    <thruster name="rcs_yaw_right">
      <file>rcs_thruster</file>
      <location unit="IN">
        <x>900</x>
        <y>72</y>
        <z>0</z>
      </location>
      <orient unit="DEG">
        <pitch>0</pitch>
        <yaw>90</yaw>
        <roll>0</roll>
      </orient>
      <feed>2</feed>
    </thruster>
    <thruster name="rcs_roll_left">
      <file>rcs_thruster</file>
      <location unit="IN">
        <x>900</x>
        <y>36</y>
        <z>36</z>
      </location>
      <orient unit="DEG">
        <pitch>45</pitch>
        <yaw>45</yaw>
        <roll>0</roll>
      </orient>
      <feed>2</feed>
    </thruster>
    <thruster name="rcs_roll_right">
      <file>rcs_thruster</file>
      <location unit="IN">
        <x>900</x>
        <y>-36</y>
        <z>-36</z>
      </location>
      <orient unit="DEG">
        <pitch>-45</pitch>
        <yaw>-45</yaw>
        <roll>0</roll>
      </orient>
      <feed>2</feed>
    </thruster>
  </propulsion>

  <aerodynamics>
    <axis name="FORCE_X">
      <function name="aero/force/drag_alpha">
        <description>Drag due to alpha</description>
        <product>
          <property>aero/qbar-psf</property>
          <property>metrics/Sw-sqft</property>
          <table>
            <independentVar>aero/alpha-rad</independentVar>
            <tableData>
              -3.1416  1.0
              -0.1745  0.1
              0.0      0.05
              0.1745   0.1
              3.1416   1.0
            </tableData>
          </table>
        </product>
      </function>
    </axis>
    <axis name="FORCE_Y">
      <function name="aero/force/side_beta">
        <description>Side force due to beta</description>
        <product>
          <property>aero/qbar-psf</property>
          <property>metrics/Sw-sqft</property>
          <table>
            <independentVar>aero/beta-rad</independentVar>
            <tableData>
              -3.1416  0.0
              -0.1745  -0.2
              0.0      0.0
              0.1745   0.2
              3.1416   0.0
            </tableData>
          </table>
        </product>
      </function>
    </axis>
    <axis name="FORCE_Z">
      <function name="aero/force/lift_alpha">
        <description>Lift due to alpha</description>
        <product>
          <property>aero/qbar-psf</property>
          <property>metrics/Sw-sqft</property>
          <table>
            <independentVar>aero/alpha-rad</independentVar>
            <tableData>
              -3.1416  0.0
              -0.1745  -0.2
              0.0      0.0
              0.1745   0.2
              3.1416   0.0
            </tableData>
          </table>
        </product>
      </function>
    </axis>
    <axis name="MOMENT_L">
      <function name="aero/moment/roll_beta">
        <description>Roll moment due to beta and roll rate</description>
        <sum>
          <product>
            <property>aero/qbar-psf</property>
            <property>metrics/Sw-sqft</property>
            <property>metrics/bw-ft</property>
            <table>
              <independentVar>aero/beta-rad</independentVar>
              <tableData>
                -0.5    0.01
                0.0     0.0
                0.5    -0.01
              </tableData>
            </table>
          </product>
          <product>
            <property>aero/qbar-psf</property>
            <property>metrics/Sw-sqft</property>
            <property>metrics/bw-ft</property>
            <property>aero/bi2vel</property>
            <table>
              <independentVar>velocities/p-rad_sec</independentVar>
              <tableData>
                -1.0   -0.1
                0.0     0.0
                1.0    -0.1
              </tableData>
            </table>
          </product>
        </sum>
      </function>
    </axis>
    <axis name="MOMENT_M">
      <function name="aero/moment/pitch_alpha">
        <description>Pitch moment due to alpha and pitch rate</description>
        <sum>
          <product>
            <property>aero/qbar-psf</property>
            <property>metrics/Sw-sqft</property>
            <property>metrics/cbarw-ft</property>
            <table>
              <independentVar>aero/alpha-rad</independentVar>
              <tableData>
                -0.5    0.05
                0.0     0.0
                0.5    -0.05
              </tableData>
            </table>
          </product>
          <product>
            <property>aero/qbar-psf</property>
            <property>metrics/Sw-sqft</property>
            <property>metrics/cbarw-ft</property>
            <property>aero/ci2vel</property>
            <table>
              <independentVar>velocities/q-rad_sec</independentVar>
              <tableData>
                -1.0   -0.15
                0.0     0.0
                1.0    -0.15
              </tableData>
            </table>
          </product>
        </sum>
      </function>
    </axis>
    <axis name="MOMENT_N">
      <function name="aero/moment/yaw_beta">
        <description>Yaw moment due to beta and yaw rate</description>
        <sum>
          <product>
            <property>aero/qbar-psf</property>
            <property>metrics/Sw-sqft</property>
            <property>metrics/bw-ft</property>
            <table>
              <independentVar>aero/beta-rad</independentVar>
              <tableData>
                -0.5   -0.02
                0.0     0.0
                0.5     0.02
              </tableData>
            </table>
          </product>
          <product>
            <property>aero/qbar-psf</property>
            <property>metrics/Sw-sqft</property>
            <property>metrics/bw-ft</property>
            <property>aero/bi2vel</property>
            <table>
              <independentVar>velocities/r-rad_sec</independentVar>
              <tableData>
                -1.0   -0.05
                0.0     0.0
                1.0    -0.05
              </tableData>
            </table>
          </product>
        </sum>
      </function>
    </axis>
  </aerodynamics>

  <flight_control name="ControlSystem">
    <property value="0.0">fcs/pitch-control</property>
    <property value="0.0">fcs/yaw-control</property>
    <property value="0.0">fcs/roll-control</property>
    <channel name="Pitch">
      <pure_gain name="fcs/pitch-gimbal-cmd">
        <input>fcs/pitch-control</input>
        <gain>5.0</gain>
      </pure_gain>
    </channel>
  </flight_control>
</fdm_config>
